*Heading
** Job name: UMAT Model name: UMAT
** Generated by: Abaqus/CAE 2022
*Preprint, echo=NO, model=NO, history=NO, contact=NO
**
** PARTS
**
*Part, name=Beam
*Node
      1,          50.,          50.,         600.
      2,          50.,          40.,         600.
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*Element, type=C3D8
   1,  367,  368,  374,  373,    1,    2,    8,    7
   2,  368,  369,  375,  374,    2,    3,    9,    8
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*Nset, nset=Set-1, generate
    1,  2196,     1
*Elset, elset=Set-1, generate
    1,  1500,     1
** Section: Section-1
*Solid Section, elset=Set-1, material=Steel
,
*End Part
**
**
** ASSEMBLY
**
*Assembly, name=Assembly
**
*Instance, name=Beam-1, part=Beam
*End Instance
**
*Nset, nset=Set-1, instance=Beam-1
  361,  362,  363,  364,  365,  366
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*Elset, elset=Set-1, instance=Beam-1
  296,  297,  298,  299,  300,  596
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*Nset, nset=Set-2, instance=Beam-1
    1,    2,    3,    4,    5,    6
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*Elset, elset=Set-2, instance=Beam-1
    1,    2,    3,    4,    5,  301
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*End Assembly
**
** MATERIALS
**
*Material, name=Steel
*User Material, constants=2
210000., 0.3
** ----------------------------------------------------------------
**
** STEP: Step-1
**
*Step, name=Step-1, nlgeom=NO
*Static
1., 1., 1e-05, 1.
**
** BOUNDARY CONDITIONS
**
** Name: BC-1 Type: Displacement/Rotation
*Boundary
Set-1, 1, 1
Set-1, 2, 2
Set-1, 3, 3
Set-1, 4, 4
Set-1, 5, 5
Set-1, 6, 6
** Name: BC-2 Type: Displacement/Rotation
*Boundary
Set-2, 3, 3, 5.
**
** OUTPUT REQUESTS
**
*Restart, write, frequency=0
**
** FIELD OUTPUT: F-Output-1
**
*Output, field, variable=PRESELECT
**
** HISTORY OUTPUT: H-Output-1
**
*Output, history, variable=PRESELECT
*End Step
