*Heading
** Job name: UMAT Model name: UMAT
** Generated by: Abaqus/CAE 6.14-1
*Preprint, echo=NO, model=NO, history=NO, contact=NO
**
** PARTS
**
*Part, name=Part-1
*Node
      1,          80.,   23.6853333,           0.
      2,   47.7400284,   22.0228577,           0.
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*Element, type=C3D8R
  1, 107,  17,   1,  16, 352, 262, 246, 261
  2, 106,  18,  17, 107, 351, 263, 262, 352
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*Nset, nset=Set-1, generate
   1,  980,    1
*Elset, elset=Set-1, generate
   1,  624,    1
** Section: Section-1
*Solid Section, elset=Set-1, material=STEEL
,
*End Part
**
**
** ASSEMBLY
**
*Assembly, name=Assembly
**
*Instance, name=Part-1-1, part=Part-1
*End Instance
**
*Nset, nset=Set-1, instance=Part-1-1
  11,  12,  13,  80,  81,  82
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*Elset, elset=Set-1, instance=Part-1-1
 121, 130, 131, 132, 133, 170
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*Nset, nset=Set-2, instance=Part-1-1
   1,   6,   7,  14,  15,  16
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*Elset, elset=Set-2, instance=Part-1-1
   1,  27,  36,  45,  57,  66
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*End Assembly
*Amplitude, name=Amp-1
             0.,              0.,             0.1,              1.
**
** MATERIALS
**
*Material, name=STEEL
*Density
 7.8e-09,
*Depvar, delete=1
      1,
*User Material, constants=3
210000., 0.3, 45.
** ----------------------------------------------------------------
**
** STEP: Step-1
**
*Step, name=Step-1, nlgeom=YES
*Dynamic, Explicit
, 0.1
*Bulk Viscosity
0.06, 1.2
**
** BOUNDARY CONDITIONS
**
** Name: BC-1 Type: Symmetry/Antisymmetry/Encastre
*Boundary
Set-1, ENCASTRE
** Name: BC-2 Type: Displacement/Rotation
*Boundary, amplitude=Amp-1
Set-2, 1, 1, 0.5
**
** OUTPUT REQUESTS
**
*Restart, write, number interval=1, time marks=NO
**
** FIELD OUTPUT: F-Output-1
**
*Output, field
*Node Output
A, RF, U, V
*Element Output, directions=YES
EVF, LE, PE, PEEQ, PEEQVAVG, PEVAVG, S, SDV, STATUS, SVAVG
*Contact Output
CSTRESS,
**
** HISTORY OUTPUT: H-Output-1
**
*Output, history, variable=PRESELECT
*End Step
