*Heading
** Job name: PleaseError Model name: UMAT-Copy
** Generated by: Abaqus/CAE 2022
*Preprint, echo=NO, model=NO, history=NO, contact=NO
**
** PARTS
**
*Part, name=Part-2
*Node
      1,        16.25,          15.,           0.
      2,        13.75,          15.,           0.
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*Element, type=S4R
 1,   1,   2,  12,  11
 2,   2,   3,  13,  12
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*Nset, nset=Set-1, generate
   1,  110,    1
*Elset, elset=Set-1, generate
  1,  90,   1
** Section: Section-2
*Shell Section, elset=Set-1, material=Steel
2., 5
*Transverse Shear Stiffness
1000., 1000., 0.
*End Part
**
**
** ASSEMBLY
**
*Assembly, name=Assembly
**
*Instance, name=Part-2-1, part=Part-2
*End Instance
**
*Nset, nset=Load, instance=Part-2-1, generate
   1,  101,   10
*Elset, elset=Load, instance=Part-2-1, generate
  1,  82,   9
*Nset, nset=Set-3, instance=Part-2-1
  10,  20,  30,  40,  50,  60
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*Elset, elset=Set-3, instance=Part-2-1
  9, 18, 27, 36, 45, 54
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*Nset, nset=Set-4, instance=Part-2-1, generate
   1,  101,   10
*Elset, elset=Set-4, instance=Part-2-1, generate
  1,  82,   9
*Nset, nset=fest, instance=Part-2-1, generate
  10,  110,   10
*Elset, elset=fest, instance=Part-2-1, generate
  9,  90,   9
*End Assembly
**
** MATERIALS
**
*Material, name=Steel
*User Material, constants=2
210000., 0.3
** ----------------------------------------------------------------
**
** STEP: Step-1
**
*Step, name=Step-1, nlgeom=NO
*Static
1., 1., 1e-05, 1.
**
** BOUNDARY CONDITIONS
**
** Name: BC-1 Type: Displacement/Rotation
*Boundary
fest, 1, 1
fest, 2, 2
fest, 3, 3
fest, 4, 4
fest, 5, 5
fest, 6, 6
** Name: BC-2 Type: Displacement/Rotation
*Boundary
Load, 1, 1, 5.
**
** OUTPUT REQUESTS
**
*Restart, write, frequency=0
**
** FIELD OUTPUT: F-Output-1
**
*Output, field, variable=PRESELECT
**
** HISTORY OUTPUT: H-Output-1
**
*Output, history, variable=PRESELECT
*End Step
